// COMSOL Multiphysics 6.2.0.290 model "cavity_lid_driven.mph"
// Outline of the model tree
// Unit system: none

Parameters
  Re = 100  // Reynolds number
  xR = 1-.1328  // x-coordinate for right vortex
  yR = 0.1484  // y-coordinate for right vortex
  xL = .0781  // x-coordinate for left vortex
  yL = .0781  // y-coordinate for left vortex
  xC = .6172  // x-coordinate for center vortex
  yC = .7344  // y-coordinate for center vortex
  u_mean = 1

Geometry
  geom1 "几何 1" (2D, length unit m)
    sq1: Square "正方形 1"
    pt1: Point | p = {0.5, 1}
    fin: Finalize "形成联合体"

Materials
  mat1: Common "材料 1" on all domains
    def "基本"
      density = 1
      dynamicviscosity = 0.001

Physics
  spf: LaminarFlow "层流" on all domains
    dependent variable u = {u, v, w}
    fp1: FluidProperties "流体属性 1" (default)
    init1: init "初始值 1" (default)
    wallbc1: WallBC "壁 1" (default)
    inl1: InletBoundary "Inlet 1" on boundaries 3, 4 | ComponentWise = VelocityFieldComponentWise; u0 = {u_mean, 0, 0}
    prpc1: PressurePointConstraint on points 3
    out1: OutletBoundary "Outlet 1" (disabled) on boundaries 2

Mesh
  mesh1 "网格 1"
    size: MeshSizeDefault "大小" | hmax = 0.0067; hmin = 2.0E-5; hauto = 1
    map1: Map "Mapped 1" on remaining entities
      dis1: Distribution on boundaries 1, 2 | numelem = 101

Studies
  std1 "研究 1"
    time: Transient "瞬态" (disabled) | tlist = range(0,0.1,1); useparam = on; pname = Re; plistarr = 1000

Methods
  method1: CodeEditor
    public class method1 extends ApplicationMethod {
      public void execute() {
        model.component("comp1").physics("spf").feature().remove("wallbc2");
        model.component("comp1").physics("spf").create("wallbc2", "WallBC", 1);
        model.component("comp1").physics("spf").feature("wallbc2").selection().set(3);
        model.component("comp1").physics("spf").feature("wallbc2").selection().set(3, 4);
        model.component("comp1").physics("spf").feature("wallbc2").set("BoundaryCondition", "Slip");
        model.component("comp1").physics("spf").feature("wallbc2").set("TranslationalVelocityOption", "Manual");
        model.component("comp1").physics("spf").feature("wallbc2").set("utr", new String[]{"u_mean", "0", "0"});
      }
    }
  method2: CodeEditor
    public class method2 extends ApplicationMethod {
      public void execute() {
        model.component("comp1").physics("spf").create("inl1", "InletBoundary", 1);
        model.component("comp1").physics("spf").feature("inl1").selection().set(3);
        model.component("comp1").physics("spf").feature("inl1").selection().set(3, 4);
        model.component("comp1").physics("spf").feature("inl1").set("ComponentWise", "VelocityFieldComponentWise");
        model.component("comp1").physics("spf").feature("inl1").set("u0", new String[]{"u_mean", "0", "0"});
        model.component("comp1").physics("spf").create("prpc1", "PressurePointConstraint", 0);
        model.component("comp1").physics("spf").feature("prpc1").selection().set(3);
      }
    }
  method3: CodeEditor
    public class method3 extends ApplicationMethod {
      public void execute() {
        model.component("comp1").physics("spf").feature("out1").selection().set(2);
      }
    }