// COMSOL Multiphysics 6.2.0.290 model "cavity_lid_driven.mph"
// Outline of the model tree
// Unit system: none

Parameters
  Re = 100  // Reynolds number
  xR = 1-.1328  // x-coordinate for right vortex
  yR = 0.1484  // y-coordinate for right vortex
  xL = .0781  // x-coordinate for left vortex
  yL = .0781  // y-coordinate for left vortex
  xC = .6172  // x-coordinate for center vortex
  yC = .7344  // y-coordinate for center vortex
  u_mean = 32

Geometry
  geom1 "几何 1" (2D, length unit m)
    sq1: Square "正方形 1"
    pt1: Point | p = {0.5, 1}
    fin: Finalize "形成联合体"

Materials
  mat1: Common "材料 1" on all domains
    def "基本"
      density = 1
      dynamicviscosity = 0.01

Physics
  poeq: PoissonEquation "Poisson's Equation" on all domains
    dependent variable u
    EquationForm.form = Automatic
    peq1: PoissonEquation "Poisson's Equation 1" (default) | c = {0.1, 0, 0, 0.1}
    zflx1: ZeroFluxBoundary "Zero Flux 1" (default)
    init1: init "Initial Values 1" (default)
    dir1: DirichletBoundary "Dirichlet Boundary Condition 1" on boundaries 3, 4 | r = 1
    dir2: DirichletBoundary "Dirichlet Boundary Condition 2" on boundaries 1, 2, 5 | r = 0

Mesh
  mesh1 "网格 1"
    size: MeshSizeDefault "大小" | hmax = 0.04; hmin = 4.0E-4; hauto = 3; custom = on
    size1: Size on boundaries 1-5 | table = cfd; hmax = 0.028; hmin = 4.0E-4; hauto = 3; hgrad = 1.07
    map1: Map "Mapped 1" (disabled) on remaining entities
      dis1: Distribution on boundaries 1, 2 | numelem = 81
    ftri1: FreeTri "Free Triangular 1" on remaining entities
    bl1: BndLayer "Boundary Layers 1" on entire geometry
      blp: BndLayerProp "Boundary Layer Properties" on boundaries 1-5 | blstretch = 1; blhminfact = 5

Studies
  std1 "研究 1"
  std2 "Study 2"
    stat: Stationary

Solver configurations
  sol1 "Solution 1" (study std2)
    v1: Variables "Dependent Variables 1"
    s1: Stationary "Stationary Solver 1"
      dDef: Direct
      fc1: FullyCoupled | linsolver = dDef

Methods
  method1: CodeEditor
    public class method1 extends ApplicationMethod {
      public void execute() {
        model.component("comp1").physics("spf").feature().remove("wallbc2");
        model.component("comp1").physics("spf").create("wallbc2", "WallBC", 1);
        model.component("comp1").physics("spf").feature("wallbc2").selection().set(3);
        model.component("comp1").physics("spf").feature("wallbc2").selection().set(3, 4);
        model.component("comp1").physics("spf").feature("wallbc2").set("BoundaryCondition", "Slip");
        model.component("comp1").physics("spf").feature("wallbc2").set("TranslationalVelocityOption", "Manual");
        model.component("comp1").physics("spf").feature("wallbc2").set("utr", new String[]{"u_mean", "0", "0"});
      }
    }
  method2: CodeEditor
    public class method2 extends ApplicationMethod {
      public void execute() {
        model.component("comp1").physics("spf").create("inl1", "InletBoundary", 1);
        model.component("comp1").physics("spf").feature("inl1").selection().set(3);
        model.component("comp1").physics("spf").feature("inl1").selection().set(3, 4);
        model.component("comp1").physics("spf").feature("inl1").set("ComponentWise", "VelocityFieldComponentWise");
        model.component("comp1").physics("spf").feature("inl1").set("u0", new String[]{"u_mean", "0", "0"});
        model.component("comp1").physics("spf").create("prpc1", "PressurePointConstraint", 0);
        model.component("comp1").physics("spf").feature("prpc1").selection().set(3);
      }
    }
  method3: CodeEditor
    public class method3 extends ApplicationMethod {
      public void execute() {
        model.component("comp1").physics("spf").feature("out1").selection().set(2);
      }
    }