// COMSOL Multiphysics 6.2.0.290 model "circular_possion.mph"
// Outline of the model tree

Geometry
  geom1 "Geometry 1" (2D, length unit m)
    c1: Circle
    fin: Finalize "Form Union"

Physics
  poeq: PoissonEquation "Poisson's Equation" on all domains
    dependent variable u
    EquationForm.form = Automatic
    peq1: PoissonEquation "Poisson's Equation 1" (default) | c = {0.1, 0, 0, 0.1}
    zflx1: ZeroFluxBoundary "Zero Flux 1" (default)
    init1: init "Initial Values 1" (default)
    dir1: DirichletBoundary "Dirichlet Boundary Condition 1" on boundaries 1-4 | r = 0

Mesh
  mesh1 "Mesh 1"
    size: MeshSizeDefault | table = cfd; hauto = 2
    fq1: FreeQuad on remaining entities

Studies
  std1 "Study 1"
    stat: Stationary