// COMSOL Multiphysics 6.2.0.290 model "circular_possion.mph"
// Outline of the model tree

Parameters
  size = 50
  sr = 3

Geometry
  geom1 "Geometry 1" (2D, length unit m)
    c1: Circle
    c2: Circle | r = 0.5
    dif1: Difference | input = c1; input2 = c2
    pol1: Polygon | type = open; source = table; table = {{0.5, 0}, {1, 0}}
    pol2: Polygon | type = open; source = table; table = {{0, -0.5}, {0, -1}}
    pol3: Polygon | type = open; source = table; table = {{-1, 0}, {-0.5, 0}}
    pol4: Polygon | type = open; source = table; table = {{0, 0.5}, {0, 1}}
    fin: Finalize "Form Union"

Physics
  poeq: PoissonEquation "Poisson's Equation" on all domains
    dependent variable u
    EquationForm.form = Automatic
    peq1: PoissonEquation "Poisson's Equation 1" (default) | c = {0.1, 0, 0, 0.1}
    zflx1: ZeroFluxBoundary "Zero Flux 1" (default)
    init1: init "Initial Values 1" (default)
    dir1: DirichletBoundary "Dirichlet Boundary Condition 1" on boundaries 7, 8, 10, 11 | r = 1
    dir2: DirichletBoundary "Dirichlet Boundary Condition 2" on boundaries 5, 6, 9, 12 | r = 0

Mesh
  mesh1 "Mesh 1"
    size: MeshSizeDefault | table = cfd; hauto = 2
    map1: Map "Mapped 1" on domains 1-4
      dis1: Distribution on boundaries 1
        type = predefined
        reverse = on
        elemcount = size
        elemratio = sr
        growthrate = exponential
      dis2: Distribution on boundaries 11, 12 | numelem = size
      dis3: Distribution on boundaries 2, 4
        type = predefined
        elemcount = size
        elemratio = sr
        growthrate = exponential
      dis4: Distribution on boundaries 3 | type = predefined; elemcount = size; elemratio = sr; growthrate = exponential

Studies
  std1 "Study 1"
    stat: Stationary